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# Electro-Mechanical System: Stochastic Binary Input
# Ian Hunter, MIT, 15 February 2018
# Started March 2002 (derived from earlier notes)
# Introduction
# A copper-wire coil (acting as a linear actuator) is attached to the free end of a 25 mm wide by 4 mm thick stainless steel beam which protrudes 615 mm from a large clamp. The coil moves vertically by about 12 mm (peak to peak) within an air gap formed by two pairs of permanent magnets. The top pair of permanent magnets create a 0.9 T magnetic field in the gap. The bottom pair of permanent magnets produce a -0.9 T magnetic field. These magnetic fields are at right angles to current flowing in the coil. The Lorentz force generated by the coil current interacting with the magnetic field is at right angles to both the current and magnetic field. The beam is consequently deflected by this force (a positive current produces an upward force and deflects the beam upward). The beam deflection is measured by an inductive position sensor (Fastar) mounted 500 mm from the clamp. The position sensor may be calibrated using a Mitutoyo Digital Micrometer (1 μm resolution) mounted above the position sensor.
# A dashpot type damper, mounted 560 mm from the clamp, may be filled with a liquid (e.g. water) to provide viscous damping. A set of calibrated masses (approximately 50 g increments) may be mounted above the dashpot to provide known forces to deflect the beam for measurement of the static beam stiffness and for determination of the coil current to force relation.
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# Static Characteristics
# Some important static characteristics of the system (obtained using the Mathcad module titled "ElectroMechanicalSystemStaticMeasurements.mcd") are listed below.
CoilCurrentMax := 0.8*A
CoilResistance := 7*ohm
CoilVoltageMax := CoilResistance*CoilCurrentMax
CoilVoltageMax = 5.6 V
# To be safe always limit the voltage to about 4 V and the current to 0.6 A (i.e. set the power supply current limit to 0.6 A).
PositionSensorVoltageToPosition := 2.5*10^-3*m/V
BeamStiffness := 750*N/m
CoilCurrentToForce := 9*N/A
CoilVoltageToForce := CoilCurrentToForce/CoilResistance
CoilVoltageToForce = 1.28571 N/V
CoilForceToVoltage := 1/CoilVoltageToForce
CoilForceToVoltage = 0.777778 V/N
## Generate Stochastic Binary Input
# We will start by generating some Gaussian white noise. Then we will then low-pass filter it to boost the low frequencies and then hard limit it to get a binary signal. The resulting band-limited stochastic binary signal is a very powerful probe for identifying linear dynamic systems.
I := 5000  # Maximum sample (number of samples = I+1)
i := 0 .. I
gwn[i] := sum(rnd(1), j = 1 .. 12) - 6  # white Gaussian signal
Δt := 0.002  # s  # Time between samples
# Sampling rate =
1/Δt = 500  # Hz
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# Define First-Order Low-Pass Filter
τ := 0.05
J := 200
j := 0 .. J
f[j] := 1/τ*exp(-j*Δt/τ)
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# Convolve the Gaussian White Noise with the Filter
gn[i] := Δt*sum(f[j]*gwn[i - j], j = 0 .. min([i, J]))  # This implements numeric convolution. Note that we give the signal the units of force (N)
# Hard Limit to Produce Binary Signal with Force Amplitude, a N
a := 1*N
x[i] :=
    -a if gn[i] < 0
    a otherwise
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# Lets now convert this force signal to a voltage (multiply by CoilForceToVoltage) and send it out the digital to analog converter (DAC) to the power amplifier (voltage to current) which drives the voice-coil actuator (current to force). At the same time we record the displacement response (system output) of the beam via the analog to digital converter (ADC) and convert it to a displacement (PositionSensorVoltageToPosition).
# [component: outputs go]
go = 0
y :=
    if go == 1
        time ← timer(Δt)
        for i ∈ 0 .. I
            timer(0)
            err ← da(0, CoilForceToVoltage*x[i])
            y[i] ← PositionSensorVoltageToPosition*ad(0)*V
        err ← da(0, 0.0)
        y
    0 otherwise  # error: This variable is undefined.
# If you wish to save the displacement data enable the write file function immediately below.
# [component: inputs y]
# If you wish to read the displacement data enable both the read file function and the "give it units" functions immediately below.
# [component: outputs y]
y := y*m  # give it units
μ_y := 1/(I + 1)*sum(y[i], i = 0 .. I)
y[i] := y[i] - μ_y  # Set y to zero mean
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# Determine input and output biased auto-correlation functions (Note: means are 0.0)
J := 200
j := 0 .. J
cxx[j] := 1/(I + 1)*sum(x[i - j]*x[i], i = j .. I)
cyy[j] := 1/(I + 1)*sum(y[i - j]*y[i], i = j .. I)
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# Determine the input-output cross-correlation function.
cxy[j] := 1/(I + 1)*sum(x[i - j]*y[i], i = j .. I)
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# Due to a limitation in the use of units in Mathcad we need to remove the units associated with these correlation functions (by dividing by the units)
cxx := cxx*1/UnitsOf(cxx)
cyy := cyy*1/UnitsOf(cyy)
cxy := cxy*1/UnitsOf(cxy)
# Estimation of the system impulse response function (system identification)
j := 0 .. J
k := 0 .. J
Cxx[j, k] := cxx[|j - k|]  # Form the Toeplitz matrix from the input auto-correlation function
h_est := 1/Δt*(Cxx^-1*cxy)*m/N
# Solve for h via Toeplitz matrix inversion (i.e. the input auto-correlation function is deconvolved from the cross-correlation function)
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# Continuous second-order low-pass under-damped impulse response function
h_m(t, Gain, ω_n, ζ) := Gain*ω_n*exp(-ζ*ω_n*t)*sin(sqrt(1 - ζ^2)*ω_n*t)/sqrt(1 - ζ^2)*m/N
h_model[j] := h_m(j*Δt, Gain, ω_n, ζ)  # error: This variable is undefined.  # sampled version of the impulse response function
# Define objective function to minimize
# We define the sum of squared error between the measured impulse response and the model
SS_error(Gain, ω_n, ζ) := sum((h_est[j] - h_m(j*Δt, Gain, ω_n, ζ))^2, j = 0 .. J)
# Estimate Parameter Values by Hand
# [component: outputs Gain]
Gain = 0.001  # m/N
# 0 | 0.5 | 1 | 1.5 | 2
# [component: outputs ω_n]
ω_n = 61  # rad /s
# 0 | 50 | 100
# [component: outputs ζ]
ζ = 1.72001
# 0 | 0.5 | 1 | 1.5 | 2
SS_error(Gain, ω_n, ζ) = 0.0119655 s^4/kg^2
h_model[j] := h_m(j*Δt, Gain, ω_n, ζ)
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# Estimate parameters by minimizing objective function using nonlinear minimization
# We will use a nonlinear minimization technique implemented by the function called Minimize() which attempts to find the parameters which minimize the function SS_error( )=0. Minimize() uses the Levenberg-Marquardt nonlinear minimization method. The parameter values set manually above are used as initial estimates for the minimization algorithm.
TOL := 0.001  # Set the minimization termination condition
[Gain; ω_n; ζ] := Minimize(SS_error, Gain, ω_n, ζ)  # Note that this will take a few minutes
# Results
Gain = 0.00137819  # m/N
ω_n = 39.1922  # rad/s
ζ = 0.378307
h_model[j] := h_m(j*Δt, Gain, ω_n, ζ)
SS_error(Gain, ω_n, ζ) = 0.000142768 s^4/kg^2
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# Note that the fit of the second-order model is excellent. The "blip" at the peak of the measured impulse response function is not noise but is repeatedly observed using a variety of stochastic inputs. It is not clear what causes it.
# Parameter Sensitivity Analysis
# The figure below shows how the SS increases as ζ is increased or decreased from its optimal value.
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# Find the corresponding I, B, and K
# The two transfer functions are related by
Gain*ω_n^2/(s^2 + 2*ζ*ω_n*s + ω_n^2)  # =
1/(I*s^2 + B*s + K)
# =
1/I/(s^2 + B/I*s + K/I)
# We can see that
# ω_n^2 | = | K/I | and | Gain*ω_n^2 | = | 1/I | and | 2*ζ*ω_n | = | B/I
# =
B/(2*sqrt(I*K))
ω_n
# =
sqrt(K/I)  # Gain
# =
1/K  # ζ
# And that
K := 1/Gain
B := 2*ζ/(Gain*ω_n)
I := 1/(Gain*ω_n^2)
# The compliance of the beam is
Gain = 0.00137819  # m/N
# The stiffness is
K = 725.59  # N/m  # which is similar to the value determined using static testing
# The inertia is
I = 0.472382  # N.s^2/m  or  kg
# The viscosity is
B = 14.0077  # N.s/m
# Determine output, y_est, from convolution of input, x, with impulse response function, h_est
# Note: this is the numeric counterpart to the convolution integral.
y_est[i] := Δt*sum(h_est[j]*x[i - j], j = 0 .. min([i, J]))
# Determine output, y_model, from convolution of x with impulse response function, h_model
y_model[i] := Δt*sum(h_model[j]*x[i - j], j = 0 .. min([i, J]))
# We now plot the actual output and the output predicted by the second-order transfer function model.
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# Notice how well we have predicted the output with the 3 parameter linear dynamic model.
# We can also plot the difference between the actual and predicted outputs. These errors or residuals are actually due to a combination of modeling error and noise (perhaps added to the output).
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# Determine the output variance accounted for, VAF, by h_est and h_model
# A quantitative measure of the success of the prediction is the variance accounted for (VAF) by the model.
σ(x) :=
    n ← length(x)
    μ ← 1/n*sum(x[i], i = 0 .. n - 1)
    sqrt(1/n*sum((x[i] - μ)^2, i = 0 .. n - 1))
# standard deviation
# NonParametric Prediction Error
error_est[i] := y_est[i] - y[i]
VAF_est := 100*(1 - σ(error_est)^2/σ(y)^2)
VAF_est = 99.9504
# Parametric Prediction Error
error_model[i] := y_model[i] - y[i]
VAF_model := 100*(1 - σ(error_model)^2/σ(y)^2)
VAF_model = 99.8775
# It is important to note that the variance accounted for by the non-parametric model, h_est, will always be greater than the variance accounted for by the parametric model, h_model . This is because the parametric second-order model used here only has 3 free parameters (Gain, ω_n, ζ) whereas the non-parametric model essentially has as J+1 parameters (the impulse response function values).
