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# Fitting Lines with Error in Both Variables
# Ian Hunter, MIT, 1 March 2018
# Started April 2004
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# Consider a data set consisting of n values of x_i and y_i  where i = 1 .. n.  The linear relation (or model) predicting the y values from the x values is:
# y = a_1.x + a_0
# This function is sometimes called a first-order polynomial or simply the equation of a straight line. The linear model has two free parameters, a_1 (slope) and a_0 (intercept).
# Minimizing the Sum of Squared Vertical Deviations
# Fitting such a straight line to a x,y data set might seem like a straight forward proposition. The usual line fitting functions found in Mathcad, MatLab, Excel and hand-held calculators estimate the two parameters of the line (slope and intercept) by minimizing the sum of the squared vertical deviations between the line and the data points. As mentioned in other notes the "sum of squares" function to be minimized is called the objective function.
# The plot below (obtained using Excel) shows an example of the "best" fit line (blue) obtained by minimizing the sum of the squared vertical deviations (purple) between the line and the data points (red).
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# It can be proved (see Straight Line Fitting notes) that the minimum possible value of the sum of the squared vertical deviations occurs when the slope (a_1) and intercept (a_0) are determined using the following parameter estimators.
Parameters_vert(x, y) :=
    n ← length(x) - 1
    S_x ← sum(x[i], i = 1 .. n)
    S_y ← sum(y[i], i = 1 .. n)
    S_xx ← sum(x[i]*x[i], i = 1 .. n)
    S_xy ← sum(x[i]*y[i], i = 1 .. n)
    Slope ← (n*S_xy - S_x*S_y)/(n*S_xx - S_x*S_x)
    Intercept ← (S_y*S_xx - S_x*S_xy)/(n*S_xx - S_x*S_x)
    return [Slope, Intercept]
# the data sets are x_i and y_i where i = 1 .. n
# As mentioned in other notes these slope and intercept estimators can exhibit numerical problems under some conditions and may be replaced by better (and sometimes much more complex) estimators (some of which employ a beautiful algorithm called singular value decomposition).
# Minimizing the sum of the squared vertical differences between the line and the data points is a good strategy when the y data are corrupted with additive Gaussian white noise (with a constant standard deviation) and the x data are noise free.  This is the typical situation when the x data are values of the independent variable which is manipulated experimentally and the y data are values of the measured dependent variable which often may be considered to have additive measurement error (or some other source of additive noise) which is Gaussian and uncorrelated (white).
# Minimizing the Sum of Squared Horizontal Deviations
# If the y data are noise free and the x data are assumed to have been corrupted by additive Gaussian white noise (having constant standard deviation) then a good strategy is to fit a line by minimizing the sum of squared horizontal deviations between the data points and the line. The plot below shows this case. However this is not a typical situation and under most circumstances you would simply exchange data so that the noise free data were plotted on the x-axis. Once exchanged the data now conform to the usual case detailed above.
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# Minimizing the Sum of Squared Perpendicular Deviations
# However if the x and y data both may be considered to be corrupted with additive Gaussian white noise then a better strategy is to minimize the sum of the squared distances between the line and the data points. If the standard deviations of the noise in both the x and y data are approximately equal then the distance to be minimized is best defined as the perpendicular (i.e. shortest) distance from the line to the data points as shown in the plot below (note that maximum likelihood theory gives a firm theoretical foundation for deriving optimal line (and more generally function and model) fitting techniques).
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# I am not aware of any predefined methods in common data analysis packages such as Mathcad, MatLab and Excel to determine the line for which the sum of the squared perpendicular deviations is minimized. It is possible to use general purpose iterative minimization techniques (such as Levenberg-Marquardt, steepest decent, etc.) to find the parameters of such a line. However in the usual case of minimizing the sum of squared vertical deviations iterative techniques are not required as direct analytic equations for the slope and intercept are readily available as shown above (the straight line "trend" fitting capability in Excel uses them, as do most calculators, Matlab. Mathcad, etc.). Such direct (explicit, non-iterative) equations for estimating the slope and intercept of the line which minimizes the sum of the squared perpendicular deviations are also available (though rarely presented) and may be written
Parameters_perp(x, y) :=
    n ← length(x) - 1
    μ_x ← 1/n*sum(x[i], i = 1 .. n)
    μ_y ← 1/n*sum(y[i], i = 1 .. n)
    S_xx ← sum((x[i] - μ_x)^2, i = 1 .. n)
    S_yy ← sum((y[i] - μ_y)^2, i = 1 .. n)
    S_xy ← sum((x[i] - μ_x)*(y[i] - μ_y), i = 1 .. n)
    Slope ← 2*S_xy/(S_xx - S_yy + sqrt((S_xx - S_yy)^2 + 4*S_xy^2))
    Intercept ← 2*S_xy/(S_yy - S_xx - sqrt((S_xx - S_yy)^2 + 4*S_xy^2))*μ_x + μ_y
    return [Slope, Intercept]  # where x_i and y_i  have i = 1 .. n
# Example of Linearly Related Data in Which Both x and y "Measurements" are Corrupted  by Additive Gaussian White Noise
# In order to illustrate the difference between line fitting using vertical and perpendicular minimization consider the following example.
# We start by generating a data set in which y is a linear function of x.
n := 101
i := 1 .. n
x[i] := 0.1*(i - 1)
# We set the slope and intercept to be
Slope := 1.0
Intercept := 0.0
y[i] := Slope*x[i] + Intercept
# We now generate two different Gaussian white noise values
e_x[i] := 0.8*sum(rnd(1) - 0.5, j = 1 .. 12)
e_y[i] := 0.8*sum(rnd(1) - 0.5, j = 1 .. 12)
# And then add them to x and y
x[i] := x[i] + e_x[i]
# and
y[i] := y[i] + e_y[i]
# We then pretend that we do not know the values of the slope and intercept and proceed to estimate them via the two different estimation techniques.
[slope_vert, intercept_vert] := Parameters_vert(x, y)
[slope_perp, intercept_perp] := Parameters_perp(x, y)
slope_vert = 0.94738
slope_perp = 1.01092
intercept_vert = 0.238688
intercept_perp = -0.0798744
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# Clearly the perpendicular estimators are closer to the original slope and intercept values (1.0 and 0.0 respectively).
# Simulation of the Difference Between the Vertical and Perpendicular Estimators
# We now simulate m repeated experiments to evaluate whether there is any substantial difference between the estimates of slope and intercept using the two estimation methods.
# where
Simulate(m) :=
    Slope ← 1.0
    Intercept ← 0.0
    for j ∈ 1 .. m
        for i ∈ 1 .. 101
            x[i] ← 0.1*(i - 1)
            y[i] ← Slope*x[i] + Intercept
            e_x[i] ← 0.8*sum(rnd(1) - 0.5, j = 1 .. 12)
            e_y[i] ← 0.8*sum(rnd(1) - 0.5, j = 1 .. 12)
            x[i] ← x[i] + e_x[i]
            y[i] ← y[i] + e_y[i]
        [slope_vert[j], intercept_vert[j]] ← Parameters_vert(x, y)
        [slope_perp[j], intercept_perp[j]] ← Parameters_perp(x, y)
    return [slope_vert, intercept_vert, slope_perp, intercept_perp]
# slope_vert stores the m estimates of the slope obtained using the vertical deviation based objective function, and
#
# intercept_vert stores the m estimates of the intercept obtained using the vertical deviation based objective function, and
#
# slope_perp stores the m estimates of the slope obtained using the perpendicular deviation based objective function, and
#
# intercept_perp stores the m estimates of the intercept obtained using the perpendicular deviation based objective function.
# We now run m simulations and save the resulting m estimates of slope and intercept.
m := 1000
j := 1 .. m
[slope_vert, intercept_vert, slope_perp, intercept_perp] := Simulate(m)
# Analysis of the Slope Estimates
# We now calculate the mean of the slope estimates
μ_slope.vert := 1/m*sum(slope_vert[j], j = 1 .. m)
μ_slope.vert = 0.930101  # vertical deviations
μ_slope.perp := 1/m*sum(slope_perp[j], j = 1 .. m)
μ_slope.perp = 0.998961  # perpendicular deviations
# and the standard deviation of the slope estimates
σ_slope.vert := sqrt(1/m*sum((slope_vert[j] - μ_slope.vert)^2, j = 1 .. m))
σ_slope.vert = 0.0360612  # vertical deviations
σ_slope.perp := sqrt(1/m*sum((slope_perp[j] - μ_slope.perp)^2, j = 1 .. m))
σ_slope.perp = 0.0406837  # perpendicular deviations
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# Notice that the perpendicular deviation based estimates of the slope (red) vary about a mean of almost exactly the true value of 1.0  (such an estimator is called an unbiased estimator) . In contrast note that the vertical deviation estimates of the slope (blue) are systematically different from the "true" value of 1.0 (such an estimator is called a biased estimator).
# The standard deviations of the slope parameter estimates are similar.
# Probability Density and Distribution Functions of the Slope Estimates
# It is of interest to ask how these estimates are distributed. Are they typically distributed according to a uniform, Gaussian, Laplacian, exponential, etc. probability density function? It turns out that for additive Gaussian white noise measurement (or otherwise) noise the parameter estimates are typically Gaussian (and incidentally white). The Gaussian nature of the parameter estimates is shown below where the computed probability density function are shown together with Gaussian density functions having the same mean (μ) and standard deviations (σ). We compute the probability density as follows
P(z, α, Δ) := 1/(Δ*m)*sum(if((α - Δ/2) < z[i] ≤ (α + Δ/2), 1, 0), i = 1 .. m)
# where z are the m values (slopes or intercept estimates in this case), and Δ is the bin width. The probability density is determined at the signal amplitude, α, plus and minus  Δ/2.
# The theoretical Gaussian probability density is
P_Gauss(z, μ, σ) := 1/(σ*sqrt(2*π))*e^(-(z - μ)^2/(2*σ^2))
α := 0.8, 0.81 .. 1.15
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# Notice that the estimates are approximately Gaussian.
# We compute the probability distribution as
D(z, α) := 1/m*sum(if(z[j] ≤ α, 1, 0), j = 1 .. m)
α := 0.8, 0.81 .. 1.15
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# It is very clear from both the density and distribution functions that the vertical deviation objective function based slope estimates are biased (blue) and the perpendicular deviation objective function based slope estimates (red) are unbiased.
# Analysis of the Intercept Estimates
# We now calculate the mean of the intercept estimates
μ_intercept.vert := 1/m*sum(intercept_vert[j], j = 1 .. m)
μ_intercept.vert = 0.352344  # vertical deviations
μ_intercept.perp := 1/m*sum(intercept_perp[j], j = 1 .. m)
μ_intercept.perp = 0.00805248  # perpendicular deviations
# and the standard deviation of the intercept estimates
σ_intercept.vert := sqrt(1/m*sum((intercept_vert[j] - μ_intercept.vert)^2, j = 1 .. m))
σ_intercept.vert = 0.211936  # vertical deviations
σ_intercept.perp := sqrt(1/m*sum((intercept_perp[j] - μ_intercept.perp)^2, j = 1 .. m))
σ_intercept.perp = 0.232756  # perpendicular deviations
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# Notice that the perpendicular deviation based estimates of the intercept (red) vary about a mean of almost exactly the true value of 0.0  (such an estimator is called an unbiased estimator) . In contrast note that the vertical deviation estimates of the intercept (blue) are systematically different from the "true" value of 0.0 (such an estimator is called a biased estimator).
# The standard deviations of the intercept parameter estimates are similar.
# Probability Density and Distribution Functions of the Intercept Estimates
α := -0.8, -0.75 .. 1.0
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α := -0.8, -0.79 .. 1.0
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# Once again it is very clear from both the density and distribution functions that the vertical deviation objective function based intercept estimates are biased (blue) and the perpendicular deviation objective function based intercept estimates (red) are unbiased.
