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## Fitting Straight Lines to Data
# Ian Hunter, MIT, 1 March 2018
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# We start by generating some Gaussian white noise which will serve as the measurement noise (error) added to the output.
n := 201
i := 1 .. n
e[i] := -6 + sum(rnd(1), j = 1 .. 12)
# a convenient way to generate Gaussian white noise is to add together 12 uniformly distributed random numbers (such as are available in all computer languages) for each sample.
μ_e := 1/n*sum(e[i], i = 1 .. n)
μ_e = 0.0396291  # we check that the mean is near zero
σ_e := sqrt(1/n*sum((e[i] - μ_e)^2, i = 1 .. n))
σ_e = 1.04154  # and note that the standard deviation is near one.
# We actually want the mean to be zero and the standard deviation to be 50. This is achieved by setting
e[i] := 50*(e[i] - μ_e)/σ_e
# and check
μ_e := 1/n*sum(e[i], i = 1 .. n)
μ_e = -4.94905e-16
σ_e := sqrt(1/n*sum((e[i] - μ_e)^2, i = 1 .. n))
σ_e = 50
# We next generate the input (numbers from -100 to 100)
x[i] := i - 101
# and then we generate the output, y_i  , as a linear function (with specified slope, α  and intercept,  β) of the input, x_i , corrupted by additive noise, e_i
# Let
α := 8
# and
β := 100
y[i] := α*x[i] + β + e[i]
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# We now consider the problem of fitting a straight line to these data. Remember that a straight line is of the form  y_i  = α x_i + β  where the slope is  α  and the intercept is  β . Therefor when we say that we are fitting a straight line to our data that is equivalent to estimating  α  and  β .
# One approach is to fit by eye. A better approach is to define a criterion by which the "goodness" of the fit may be determined. A common criterion is the "least squares" or "least sum of squares" measure which simply sums the squares of the prediction errors. The RMS error ("root mean square" error) criterion achieves the same results (see below).  The prediction errors are simply the vertical difference between the y values and the predicted y values (given by  α x_i + β ). The parameters (α and β ) which minimize the criterion are termed the optimal estimated parameters.
# The predicted y values are
yp[i] := α*x[i] + β
# The prediction errors are given by
pe[i] := yp[i] - y[i]
# and the "sum of squares" and RMS criteria are
SS := sum(pe[i]^2, i = 1 .. n)
RMS := sqrt(1/n*sum(pe[i]^2, i = 1 .. n))
# Now try changing the slope and intercept until the RMS error is minimized (if you have a wheel on your mouse try using it to move the sliders).
# Slope | Intercept
# [component: outputs a1]
# [component: outputs a0]
β = 100
α = 8
RMS := sqrt(1/n*sum((a1*x[i] + a0 - y[i])^2, i = 1 .. n))
yy := transpose([-100*a1 + a0, 100*a1 + a0])
xx := transpose([-100, 100])
RMSy := transpose([RMS, RMS])
RMSx := transpose([0, 1])
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RMS = 161.625
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# We can see that the RMS depends on the values of  the parameters a1 and a0  . We can therefore define the RMS as a function of  a1 and a0  . Such a function is called an objective function.
RMS(α, β) := sqrt(1/n*sum((α*x[i] + β - y[i])^2, i = 1 .. n))
# The RMS objective function is shown below (both as a surface plot and a contour plot). Use the mouse to rotate the plot about to see the form of this function.
# [component: inputs [(RMS, RMS), □]]
# If we hold  α constant (at its optimal value) and vary β we can see the way in which the RMS objective function changes or is "sensitive" to changes in β  . We can do the same for the other parameter.
α := 8
β := 100
αα := slope(x, y)
ββ := intercept(x, y)
RMSmin := RMS(αα, ββ)
alpha := 3, 3.01 .. 13
beta := -200, -199.5 .. 400
x1 := transpose([β, β])
y1 := transpose([0, 300])
x2 := transpose([-200, 400])
y2 := transpose([RMSmin, RMSmin])
x3 := transpose([α, α])
y3 := transpose([0, 300])
x4 := transpose([-3, 13])
y4 := transpose([RMSmin, RMSmin])
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# The objective function has two parameters (in this case). The one dimensional plots above constitute "slices" through the two dimensional RMS objective function and are called sensitivity functions.
# We now zoom in on the sensitivity function minimums.
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# Notice that the "true" (original) parameter values are not always the same as those estimated by minimizing the objective function (or in this case the sensitivity functions).
# So far we have determined the "best" parameter estimates by attempting to find the objective function (RMS) minimum by manually adjusting the parameters. What we need is an automatic way to find the objective function minimum.
# Issac Newton proposed a fairly general technique to find the minimum of a function. Newton's method involves starting with some guesses as to the parameter values. These initial guesses are then successively improved by the following simple algorithm (where a0_new and a1_new  are the current parameter estimates and a0_old and a1_old  are the previous parameter estimates).
# Minimization techniques (such as Newton's method, quasi-Newton techniques, conjugate gradient method, the method of steepest descent, the Levenberg-Marquardt technique)  may be used to find the minimum (lowest point) of the objective function (and hence the "best fit" or optimal parameter estimates). These techniques start with some initial parameter estimates (i.e. a point on the objective function) . These parameter values are then adjusted in an attempt to follow a path down the surface torward the lowest point (or some sufficiently low point). The parameters at the lowest point are termed the "best fit" or optimal parameters. The process of successively trying new (and better) parameter values is called iteration.
# However in the case of fitting some simple functions such as the straight line (as above) we do not need to use an iterative minimization technique to find the objective function minimum. Instead the optimal parameters, can be found directly (analytically).
RMS(α, β) := sqrt(1/n*sum((α*x[i] + β - y[i])^2, i = 1 .. n))
# The minimum of the RMS objective function corresponds to the point where the double derviative is zero. The minimum of  RMS^2 occurs at the same parameter values as the minimum of RMS. Thus
# We will save the original x and y and α and β  values as
xx := x
yy := y
alpha := α
beta := β
nn := n
x := x
y := y
α := α
β := β
n := n
# The partial derivatives of RMS squared with respect to the parameters are
d/dα(sum((α*x[i] + β - y[i])^2, i = 1 .. n)) → 2*β*sum(x[i], i = 1 .. n) - 2*sum(x[i]*y[i], i = 1 .. n) + 2*α*sum(x[i]^2, i = 1 .. n)
d/dβ(sum((α*x[i] + β - y[i])^2, i = 1 .. n)) → 2*α*sum(x[i], i = 1 .. n) - 2*sum(y[i], i = 1 .. n) + 2*β*n
# These partial derivatives will equal zero at the minimum of the objective function (i.e. slopes are zero at this minimum).
# We have two unknowns ( α and  β) and two independent equations so we can solve for α and β
x := xx
y := yy
n := nn
α := (n*sum(x[i]*y[i], i = 1 .. n) - sum(x[i], i = 1 .. n)*sum(y[i], i = 1 .. n))/(n*sum(x[i]*x[i], i = 1 .. n) - sum(x[i], i = 1 .. n)*sum(x[i], i = 1 .. n))
α = 7.94788
β := (sum(x[i]*y[i], i = 1 .. n)*sum(x[i], i = 1 .. n) - sum(x[i]*x[i], i = 1 .. n)*sum(y[i], i = 1 .. n))/(sum(x[i], i = 1 .. n)*sum(x[i], i = 1 .. n) - n*sum(x[i]*x[i], i = 1 .. n))
β = 100
# Note that these formulas are notoriously sensitive to numerical round-off errors. More accurate numerical methods are available.
