2/3 = 0.666667
1/3*atm = 33775 Pa
22/7 = 3.14286
10*A*120*V = 1200 W
10*A*120*V = 1200 W
π = 3.14159
π float, 22 → 3.141592653589793238463
350*F*(2.5*V)^2*0.5 = 1093.75 J
a := 2
b := 3
a/b = 0.666667
350*F*(2.5*V)^2*0.5/(0.059*kg) = 18538.1 J/kg
1*atm = 101325 Pa
1*F*(20*V)^2/2 = 200 J
1. atm = 101325 N/m^2
10*V/(2*A) = 5 Ω
1*F*(20*V)^2/(2*1.13*kg) = 176.991 J/kg
# [component: outputs a]
# [component: outputs f]
f := f/10
a = 26
f = 1.6
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integral(sin(t), t) → -cos(t)
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integral(sin(x), x = 0 .. π) → 2
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integral(|sin(x)|, x = 0 .. 2*π) → 4
# If
R := 10000*Ω  # and
C := 10^-6*F
τ := R*C
τ = 0.01 s
# the unit step response function, y(t),  is
y(t) := 1 - e^(-t/τ)  # where
# Insert Component Microsoft Excel 0 Inputs 2 Outputs (use Properties to define the range)
# [component: outputs [time; Voltage]]
# [component: outputs τ]
τ := τ/1000
τ = 0.01
# [component: outputs a]
a := a/5
a = 9.4
V(t) := a*(1 - e^(-t/τ))
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