# Newton's Method
# Ian Hunter, MIT, 1 March 2018
# Started April 2003
# The roots of a function, g(x), are simply the x values when g(x)=0 (i.e. the points at which a function crosses or touches the x-axis). The roots of second-, third- and fourth-order polynomials (i.e. a quadratic, cubic and quartic polynomials) may be found using explicit formulas. (mathematicians spent considerable time searching for such formulas for 5th and higher order polynomials until the Norwegian mathematician Neils Abel proved that no such formulas were possible).
# For second-order polynomials (quadratics)
g(x, a, b, c) := a*x^2 + b*x + c
# The formulas for the 2 roots are
x_lower(a, b, c) := (-b - sqrt(b^2 - 4*a*c))/(2*a)
x_higher(a, b, c) := (-b + sqrt(b^2 - 4*a*c))/(2*a)
# For example the function
g(x) := x^2 - x - 1  # Incidently the positive root of this function is the Golden Ratio.
# has roots
x_low := x_lower(1, -1, -1)
x_high := x_higher(1, -1, -1)
x_low = -0.618034
x_high = 1.61803
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# Newton's Method
# A number of methods exist to find roots when explicit formulas are not available. The most famous of these methods is called Newton's method (or the Newton-Raphson method) developed by Issac Newton in the mid 1600s.
# The idea behind this method is to start with an initial guess which is close to the desired root. In the example above lets try to find the second root, x_high (the Golden Ratio).
# We will call our initial guess x_0 and set
x_0 := 2
# We next find the slope of g(x) at the point (x_0, g(x_0)).
# We can get this by differentiation
g'(x) := d/dx(g(x))
# Newton's method specifies the next "guess"as
x_1 := x_0 - g(x_0)/g'(x_0)
x_1 = 1.66667
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# Newton's method specifies the next "guess"as
x_2 := x_1 - g(x_1)/g'(x_1)
x_2 = 1.61905  # very close
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# It is clear from this example that Newton's method converges very rapidly to the root.
# Lets do a few more iterations and zoom in on the root.
x_3 := x_2 - g(x_2)/g'(x_2)
x_3 = 1.61803
x_4 := x_3 - g(x_3)/g'(x_3)
x_4 = 1.61803  # very close
x_5 := x_4 - g(x_4)/g'(x_4)
x_5 = 1.61803
x_6 := x_5 - g(x_5)/g'(x_5)
x_6 = 1.61803  # no change
# Find the Square Root of 2
# If  x  =
sqrt(2)  # then  x^2 = 2  # and the root of
g(x) := x^2 - 2
# is
sqrt(2)
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# Using Newton's method we determine the derivative
# and then start with a guess
g'(x) := d/dx(g(x))
x_0 := 2
x_1 := x_0 - g(x_0)/g'(x_0)
x_1 = 1.5
x_0 - x_1 = 0.5
x_2 := x_1 - g(x_1)/g'(x_1)
x_2 = 1.41667
x_1 - x_2 = 0.0833333
x_3 := x_2 - g(x_2)/g'(x_2)
x_3 = 1.41422
x_2 - x_3 = 0.00245098
x_4 := x_3 - g(x_3)/g'(x_3)
x_4 = 1.41421
x_3 - x_4 = 2.1239e-6
x_5 := x_4 - g(x_4)/g'(x_4)
x_5 = 1.41421
x_4 - x_5 = 1.59472e-12
x_6 := x_5 - g(x_5)/g'(x_5)
x_6 = 1.41421
x_5 - x_6 = 2.22045e-16  # no change
sqrt(2) = 1.41421
# Find Pi
g(x) := sin(x)
d/dx(sin(x)) → cos(x)
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# The root of f(x) near 3 is  π .
x_0 := 3
x_1 := x_0 - sin(x_0)/cos(x_0)
x_1 = 3.14255
x_0 - x_1 = -0.142547
x_2 := x_1 - sin(x_1)/cos(x_1)
x_2 = 3.14159
x_1 - x_2 = 0.00095389
x_3 := x_2 - sin(x_2)/cos(x_2)
x_3 = 3.14159
x_2 - x_3 = -2.89316e-10
x_4 := x_3 - sin(x_3)/cos(x_3)
x_4 = 3.14159
x_3 - x_4 = 0
x_5 := x_4 - sin(x_4)/cos(x_4)
x_5 = 3.14159
x_4 - x_5 = 0
